# Дано:
# Тихоходный вал
F_t := 3525.0  # Н
F_r := 1319.3  # Н
F_a := 731.0  # Н
d_2 := 19.8725  # мм
l := 54.5  # мм
l_1 := 28.5  # мм
l_2 := 46.5  # мм
T_т := 73.5  # Н*м
# Решение:
# 0) Консольная сила
F_к := 100*T_т^0.5 = 857.321  # Н
# 1) Радиальные реакции от сил в зацеплении
# В плоскости YOZ
# ΣM1=0
R_2в := (F_r*(l - l_1) + F_a*d_2/2)/l = 762.664  # Н
# ΣM2=0
R_1в := (F_r*l_1 - F_a*d_2/2)/l = 556.636  # Н
# Проверка:
R_1в + R_2в - F_r = -2.27374e-13
# В плоскости XOZ
# ΣM1=0
R_2r := F_t*(l - l_1)/l = 1681.65  # Н
# ΣM2=0
R_1r := F_t*l_1/l = 1843.35  # Н
# Проверка:
R_1r + R_2r - F_t = 0
R_1 := (R_1r^2 + R_1в^2)^0.5 = 1925.56  # Н
R_2 := (R_2r^2 + R_2в^2)^0.5 = 1846.51  # Н
# 2) Радиальные реакции от консольной силы
R_r1к := F_к*l_2/l = 731.476  # Н
R_r2к := F_к*(l_2 + l)/l = 1588.8  # Н
R_r2к - R_r1к - F_к = 1.13687e-13  # Н
# 3) Полная реакция в опорах
F_r1max := R_1 + R_r1к = 2657.04  # Н
F_r2max := R_2 + R_r2к = 3435.31  # Н
# 4) Для типового нагружения II:
K_E := 0.63
F_r1 := K_E*F_r1max = 1673.93  # Н
F_r2 := K_E*F_r2max = 2164.25  # Н
F_A := K_E*F_a = 460.53  # Н
# 5) Предварительный выбор пошипников:
# За основу берем шариковый радиальный подшипник №207
d := 35  # мм
D := 72  # мм
B := 17  # мм
D_w := 11.112  # мм
C_r := 25500  # Н
C_0r := 13700  # Н
# 6) Для радиальных шарикоподшипников из условия равновесия:
F_a1 := 0  # Н
F_a2 := F_A = 460.53  # Н
F_a := F_a2 = 460.53  # Н
# 7) Дальнейший расчет выполняем для более нагруженного подшипника опоры 2:
D_pw := 0.5*(D + d) = 53.5  # мм
D_w*cos(0)/D_pw = 0.207701
f_0 := 13.7  # (табл. 7.3)
e := 0.28*(f_0*F_a/C_0r)^0.23 = 0.234265
V := 1  # (При вращении внутреннего кольца)
F_a/(V*F_r) = 0.349071
# F_a/(V*F_r) > e
X := 0.56
Y := 0.44/e = 1.87822
К_б := 1.4  # (табл. 7.5)
К_т := 1  # t <= 100 oC
P_r := (V*X*F_r2 + Y*F_a)*К_б*К_т = 2907.73  # Н
a_1 := 1  # (табл. 7.6, принимаем вероятность безотказной работы 90%)
a_23 := 0.7  # обычычные условия применения
k := 3  # шариковый подшипниковый
n := 933.4
L_10ah := a_1*a_23*(C_r/P_r)^k*10^6/(60*n) = 8430.17
